P(s) := 0.1*s^5 + 1.3*s^4 + 6.3*s^3 + 14.3*s^2 + 15.2*s + 6
P(1i*ω) collect → 1.3*ω^4 - 14.3*ω^2 + 6 + 0.1i*ω^5 - 6.3i*ω^3 + 15.2i*ω
Real(ω) := 1.3*ω^4 - 14.3*ω^2 + 6
Imit(ω) := 0.1*ω^5 - 6.3*ω^3 + 15.2*ω
ω := 0, 0.1 .. 10000
C := 50
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