1.
A(s) := 4 + 3*s + 7*s^2 + 2*s^3 + 2*s^4
a0 := [1; 5; 5; 3; 2]
a := a0 = [1; 5; 5; 3; 2]
δ := 0.5
# Характеристический полином:
A(s) := a[0] + a[1]*s + a[2]*s^2 + a[3]*s^3 + a[4]*s^4 → 2*s^4 + 3*s^3 + 5*s^2 + 5*s + 1
# Матрица главного определителя Гурвица
Δ_0 := [3, 5, 0, 0; 2, 5, 1, 0; 0, 3, 5, 0; 0, 2, 5, 1]
# Диагональные миноры
Δ_1 := submatrix(Δ_0, 0, 2, 0, 2) = [3, 5, 0; 2, 5, 1; 0, 3, 5]
|Δ_1| = 16
Δ_2 := submatrix(Δ_0, 0, 1, 0, 1) = [3, 5; 2, 5]
|Δ_2| = 5
Δ_3 := submatrix(Δ_0, 0, 0, 0, 0) = [3]
|Δ_3| = 3
# Все определители Гурвица положительно, следовательно, САУ - устойчива.
# 2. | Полиномы Харитонова:
a := a0 + [-δ; -δ; δ; δ; -δ]
A1(s) := a[0] + a[1]*s + a[2]*s^2 + a[3]*s^3 + a[4]*s^4 → 4.5*s + 5.5*s^2 + 3.5*s^3 + 1.5*s^4 + 0.5
# Матрица главного определителя Гурвица
Δ_0 := [3.15, 4.85, 0, 0; 1.85, 5.15, 0.85, 0; 0, 3.15, 4.85, 0; 0, 1.85, 5.15, 0.85]
# Диагональные миноры
Δ_1 := submatrix(Δ_0, 0, 2, 0, 2) = [3.15, 4.85, 0; 1.85, 5.15, 0.85; 0, 3.15, 4.85]
|Δ_1| = 26.7284
Δ_2 := submatrix(Δ_0, 0, 1, 0, 1) = [3.15, 4.85; 1.85, 5.15]
|Δ_2| = 7.25
Δ_3 := submatrix(Δ_0, 0, 0, 0, 0) = [3.15]
|Δ_3| = 3.15
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# 3. | Полиномы Харитонова:
a := a0 + [δ; δ; -δ; -δ; δ]
A2(s) := a[0] + a[1]*s + a[2]*s^2 + a[3]*s^3 + a[4]*s^4 → 5.5*s + 4.5*s^2 + 2.5*s^3 + 2.5*s^4 + 1.5
# Матрица главного определителя Гурвица
Δ_0 := [2.85, 5.15, 0, 0; 2.15, 4.85, 1.15, 0; 0, 2.85, 5.15, 0; 0, 2.15, 4.85, 1.15]
# Диагональные миноры
Δ_1 := submatrix(Δ_0, 0, 2, 0, 2) = [2.85, 5.15, 0; 2.15, 4.85, 1.15; 0, 2.85, 5.15]
|Δ_1| = 4.82163
Δ_2 := submatrix(Δ_0, 0, 1, 0, 1) = [2.85, 5.15; 2.15, 4.85]
|Δ_2| = 2.75
Δ_3 := submatrix(Δ_0, 0, 0, 0, 0) = [2.85]
|Δ_3| = 2.85
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# 4. | Полиномы Харитонова:
a := a0 + [-δ; δ; δ; -δ; -δ]
A3(s) := a[0] + a[1]*s + a[2]*s^2 + a[3]*s^3 + a[4]*s^4 → 5.5*s + 5.5*s^2 + 2.5*s^3 + 1.5*s^4 + 0.5
# Матрица главного определителя Гурвица
Δ_0 := [2.85, 5.15, 0, 0; 1.85, 5.15, 0.85, 0; 0, 2.85, 5.15, 0; 0, 1.85, 5.15, 0.85]
# Диагональные миноры
Δ_1 := submatrix(Δ_0, 0, 2, 0, 2) = [2.85, 5.15, 0; 1.85, 5.15, 0.85; 0, 2.85, 5.15]
|Δ_1| = 19.6184
Δ_2 := submatrix(Δ_0, 0, 1, 0, 1) = [2.85, 5.15; 1.85, 5.15]
|Δ_2| = 5.15
Δ_3 := submatrix(Δ_0, 0, 0, 0, 0) = [2.85]
|Δ_3| = 2.85
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# 5. | Полиномы Харитонова:
a := a0 + [δ; -δ; -δ; δ; δ]
A4(s) := a[0] + a[1]*s + a[2]*s^2 + a[3]*s^3 + a[4]*s^4 → 4.5*s + 4.5*s^2 + 3.5*s^3 + 2.5*s^4 + 1.5
# Матрица главного определителя Гурвица
Δ_0 := [3.15, 4.85, 0, 0; 2.15, 4.85, 1.15, 0; 0, 3.15, 4.85, 0; 0, 2.15, 4.85, 1.15]
# Диагональные миноры
Δ_1 := submatrix(Δ_0, 0, 2, 0, 2) = [3.15, 4.85, 0; 2.15, 4.85, 1.15; 0, 3.15, 4.85]
|Δ_1| = 12.1116
Δ_2 := submatrix(Δ_0, 0, 1, 0, 1) = [3.15, 4.85; 2.15, 4.85]
|Δ_2| = 4.85
Δ_3 := submatrix(Δ_0, 0, 0, 0, 0) = [3.15]
|Δ_3| = 3.15
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